*Heading
** Job name: Job-1 Model name: Model-1
** Generated by: Abaqus/CAE 6.10-EF1
*Preprint, echo=NO, model=NO, history=NO, contact=NO
**
** PARTS
**
*Part, name=Part-1
*Node
      1, 0.00704580825, 0.00188096613
      2, 0.00200000009, 0.00199337746
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*Element, type=DC2D8
 1,    1,   11,  175,   41,  880,  881,  882,  883
 2,   11,   12,  176,  175,  884,  885,  886,  881
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*Nset, nset=_PickedSet3, internal
    6,    7,    8,    9,   10,   51
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*Elset, elset=_PickedSet3, internal, generate
 157,  800,    1
*Nset, nset=_PickedSet4, internal
    1,    2,    3,    4,    5,    6
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*Elset, elset=_PickedSet4, internal, generate
   1,  156,    1
** Section: Cu
*Solid Section, elset=_PickedSet4, material=Cu
,
** Section: Ni
*Solid Section, elset=_PickedSet3, material=Ni
,
*End Part
**
**
** ASSEMBLY
**
*Assembly, name=Assembly
**
*Instance, name=Part-1-1, part=Part-1
*End Instance
**
*Elset, elset=__PickedSurf4_S3, internal, instance=Part-1-1, generate
 43,  56,   1
*Surface, type=ELEMENT, name=_PickedSurf4, internal
__PickedSurf4_S3, S3
*Elset, elset=__PickedSurf6_S1, internal, instance=Part-1-1, generate
 11,  14,   1
*Elset, elset=__PickedSurf6_S4, internal, instance=Part-1-1
  57,  67,  77,  87,  97, 107, 117, 127, 137, 147, 617, 663, 709, 755
*Surface, type=ELEMENT, name=_PickedSurf6, internal
__PickedSurf6_S1, S1
__PickedSurf6_S4, S4
*Elset, elset=__PickedSurf7_S2, internal, instance=Part-1-1, generate
 202,  800,   46
*Surface, type=ELEMENT, name=_PickedSurf7, internal
__PickedSurf7_S2, S2
*End Assembly
**
** MATERIALS
**
*Material, name=Cu
*Conductivity
300.,
*Material, name=Ni
*Conductivity
90.,
** ----------------------------------------------------------------
**
** STEP: Step-1
**
*Step, name=Step-1
*Heat Transfer, steady state, deltmx=0.
1., 1., 1e-05, 1.,
**
** INTERACTIONS
**
** Interaction: Int-1
*Sfilm
_PickedSurf4, F, 900., 30.
** Interaction: Int-2
*Sfilm
_PickedSurf6, F, 40., 225.
** Interaction: Int-3
*Sfilm
_PickedSurf7, F, 300., 13.
**
** OUTPUT REQUESTS
**
*Restart, write, frequency=0
**
** FIELD OUTPUT: F-Output-1
**
*Output, field, variable=PRESELECT
*Output, history, frequency=0
*End Step
